// COMSOL Multiphysics 6.3.0.420 model "cmt.mph"
// Outline of the model tree
// Components: comp1 "Component 1", comp2 "Component 2", comp3 "Component 3"

Parameters
  wGuide = 500e-9[m]
  tGuide = 250e-09[m]
  tAir = 3e-6[m]
  freq_in = c_const/lambda_in
  lambda_in = 1550e-9[m]
  solPhi1 = 'sol1'
  iPhi1 = 1
  solPhi2 = 'sol2'
  iPhi2 = 2  // lembrar de mudar de 1 e 2
  gap = 250e-9[m]
  w = 2*pi*freq_in
  e0 = epsilon0_const
  esi = 3.5
  ear = 1
  de = esi*esi - ear*ear

Variables
  var1 "Variables Fields" [comp1]
    Ex1 = withsol(solPhi1,emw.Ex,setind(lambda,iPhi1))/sqrt(P1)
    Ey1 = withsol(solPhi1,emw.Ey,setind(lambda,iPhi1))/sqrt(P1)
    Ez1 = withsol(solPhi1,emw.Ez,setind(lambda,iPhi1))/sqrt(P1)
    Hx1 = withsol(solPhi1,emw.Hx,setind(lambda,iPhi1))/sqrt(P1)
    Hy1 = withsol(solPhi1,emw.Hy,setind(lambda,iPhi1))/sqrt(P1)
    Hz1 = withsol(solPhi1,emw.Hz,setind(lambda,iPhi1))/sqrt(P1)
    dP1 = withsol(solPhi1,emw.Poavz,setind(lambda,iPhi1))
    P1 = intAll1(dP1)/1[W]
  var3 "Variables Fields" [comp2]
    Ex2 = withsol(solPhi2,emw2.Ex,setind(lambda,iPhi2))/sqrt(P2)
    Ey2 = withsol(solPhi2,emw2.Ey,setind(lambda,iPhi2))/sqrt(P2)
    Ez2 = withsol(solPhi2,emw2.Ez,setind(lambda,iPhi2))/sqrt(P2)
    Hx2 = withsol(solPhi2,emw2.Hx,setind(lambda,iPhi2))/sqrt(P2)
    Hy2 = withsol(solPhi2,emw2.Hy,setind(lambda,iPhi2))/sqrt(P2)
    Hz2 = withsol(solPhi2,emw2.Hz,setind(lambda,iPhi2))/sqrt(P2)
    dP2 = withsol(solPhi2,emw2.Poavz,setind(lambda,iPhi2))
    P2 = intAll2(dP2)/1[W]
  var5 "Variables Fields" [comp3]
    E1x = comp1.genext1(Ex1)
    E1y = comp1.genext1(Ey1)
    E1z = comp1.genext1(Ez1)
    H1x = comp1.genext1(Hx1)
    H1y = comp1.genext1(Hy1)
    H1z = comp1.genext1(Hz1)
    E2x = comp2.genext2(Ex2)
    E2y = comp2.genext2(Ey2)
    E2z = comp2.genext2(Ez2)
    H2x = comp2.genext2(Hx2)
    H2y = comp2.genext2(Hy2)
    H2z = comp2.genext2(Hz2)
    p1 = comp1.genext1(P1)
    p2 = comp2.genext2(P2)
  var6 "Variables Coupling" [comp3]
    dB11 = (conj(E1x)*H1y - conj(E1y)*H1x)+(E1x*conj(H1y) - E1y*conj(H1x))  // denominador de c12, x11, k11 e k12
    dB12 = (conj(E1x)*H2y - conj(E1y)*H2x)+(E2x*conj(H1y) - E2y*conj(H1x))  // numerador de c12
    B11 = intAll(dB11)
    B12 = intAll(dB12)
    C12 = B12/B11
    dB21 = (conj(E2x)*H1y - conj(E2y)*H1x)+(E1x*conj(H2y) - E1y*conj(H2x))  // numerador de c21
    dB22 = (conj(E2x)*H2y - conj(E2y)*H2x)+(E2x*conj(H2y) - E2y*conj(H2x))  // denominador de c21
    B21 = intAll(dB21)
    B22 = intAll(dB22)
    C21 = B21/B22
    dA11 = w*e0*de*(conj(E1x)*E1x+conj(E1y)*E1y +conj(E1z)*E1z)
    dA22 = w*e0*de*(conj(E2x)*E2x + conj(E2y)*E2y + conj(E2z)*E2z)
    A11 = int2(dA11)
    X11 = A11/B11
    A22 = int1(dA22)
    X22 = A22/B22
    dA12 = w*e0*de*(conj(E1x)*E2x+conj(E1y)*E2y +conj(E1z)*E2z)
    dA21 = w*e0*de*(conj(E2x)*E1x+conj(E2y)*E1y +conj(E2z)*E1z)
    A12 = int1(dA12)
    A21 = int2(dA21)
    K12 = A12/B11
    K21 = A21/B22

Couplings
  intop1: Integration on all domains | opname = intAll1
  intop2: Integration on all domains | opname = intAll2
  intop3: Integration on domains 2-4 | opname = intAll
  genext1: GeneralExtrusion on all domains | dstmap = {x+wGuide/2 + gap/2, y}; srcmap = {x, y}
  genext2: GeneralExtrusion on all domains | dstmap = {x- wGuide/2 - gap/2, y}; srcmap = {x, y}
  intop4: Integration "Integration Guide 1" on domains 3 | opname = int1
  intop5: Integration "Integration Guide 2" on domains 4 | opname = int2

Probes
  var1: GlobalVariable "C12" [comp3] | expr = C12; table = tbl2
  var2: GlobalVariable "C21" [comp3] | expr = C21; unit = 1; table = tbl2
  var3: GlobalVariable "X11" [comp3] | expr = X11; unit = 1/m; table = tbl2
  var4: GlobalVariable "X22" [comp3] | expr = X22; unit = 1/m; table = tbl2
  var5: GlobalVariable "K12" [comp3] | expr = K12; unit = 1/m; table = tbl2
  var6: GlobalVariable "K21" [comp3] | expr = K21; unit = 1/m; table = tbl2
  var7: GlobalVariable "neff1" [comp3] | unit = 1; descr = 1; table = tbl2
  var8: GlobalVariable "neff2" [comp3] | unit = 1; descr = 1; table = tbl2
  var9: GlobalVariable "xpol1" [comp3] | unit = 1; descr = 1; table = tbl2
  var11: GlobalVariable "ypol1" [comp3] | probename = var10; unit = 1; descr = 1; table = tbl2
  var13: GlobalVariable "zpol1" [comp3] | probename = var11; unit = 1; descr = 1; table = tbl2
  var10: GlobalVariable "xpol2" [comp3] | probename = var12; unit = 1; descr = 1; table = tbl2
  var12: GlobalVariable "ypol2" [comp3] | probename = var13; unit = 1; descr = 1; table = tbl2
  var14: GlobalVariable "zpol2" [comp3] | unit = 1; descr = 1; table = tbl2

Geometry
  geom1 "Geometry 1" [comp1] (2D, length unit m)
    r1: Rectangle "Waveguide1" | size = {wGuide, tGuide}; base = center
    r2: Rectangle "Air" | size = {wGuide + 2*tAir, tGuide + 2*tAir}; base = center
    fin: Finalize "Form Union"
  geom2 "Geometry 1" [comp2] (2D, length unit m)
    r2: Rectangle "Air" | size = {wGuide + 2*tAir, tGuide + 2*tAir}; base = center
    r3: Rectangle "Waveguide2" | size = {wGuide, tGuide}; base = center
    fin: Finalize "Form Union"
  geom3 "Geometry 1" [comp3] (2D, length unit m)
    r1: Rectangle "Waveguide1" | size = {wGuide, tGuide}; base = center; pos = {-(wGuide+gap)/2, 0}
    r2: Rectangle "Air" | size = {wGuide + 2*tAir, tGuide + 2*tAir}; base = center
    r3: Rectangle "Waveguide2" | size = {wGuide, tGuide}; base = center; pos = {(wGuide+gap)/2, 0}
    r4: Rectangle "Air 1" | size = {wGuide + 1.2*tAir, tGuide + 1.2*tAir}; base = center
    fin: Finalize "Form Union"

Materials
  mat1: Common "Air" [comp1] on domains 1, 2
    def: def "Basic"
      thermalexpansioncoefficient = alpha_p(pA,T)
      molarmass = 0.02897[kg/mol]
      bulkviscosity = muB(T)
      relpermeability = 1
      relpermittivity = 1
      dynamicviscosity = eta(T)
      ratioofspecificheat = 1.4
      electricconductivity = 0[S/m]
      heatcapacity = Cp(T)
      density = rho(pA,T)
      thermalconductivity = k(T)
      soundspeed = cs(T)
      eta: Piecewise | arg = T; pieces = {200.0, 1600.0, -8.38278E-7+8.35717342E-8*T^1-7.69429583E-11*T^2+4.6437266E-14*T^3-1.06585607E-17*T^4}; argunit = K; fununit = Pa*s
      Cp: Piecewise | arg = T; pieces = {200.0, 1600.0, 1047.63657-0.372589265*T^1+9.45304214E-4*T^2-6.02409443E-7*T^3+1.2858961E-10*T^4}; argunit = K; fununit = J/(kg*K)
      rho: Analytic | expr = pA*0.02897/R_const[K*mol/J]/T; args = {pA, T}; fununit = kg/m^3; argunit = {Pa, K}
      k: Piecewise | arg = T; pieces = {200.0, 1600.0, -0.00227583562+1.15480022E-4*T^1-7.90252856E-8*T^2+4.11702505E-11*T^3-7.43864331E-15*T^4}; argunit = K; fununit = W/(m*K)
      cs: Analytic | expr = sqrt(1.4*R_const[K*mol/J]/0.02897*T); args = T; fununit = m/s; argunit = K
      an1: Analytic | funcname = alpha_p; expr = -1/rho(pA,T)*d(rho(pA,T),T); args = {pA, T}; fununit = 1/K; argunit = {Pa, K}
      an2: Analytic "Analytic 2a" | funcname = muB; expr = 0.6*eta(T); args = T; fununit = Pa*s; argunit = K
    RefractiveIndex: RefractiveIndex
      n = 1
      ki = 0
    NonlinearModel: NonlinearModel
      BA = def.gamma-1
    idealGas: idealGas
      Rs = R_const/Mn
      heatcapacity = Cp(T)
      ratioofspecificheat = 1.4
      molarmass = 0.02897[kg/mol]
      Cp: Piecewise | arg = T; pieces = {200.0, 1600.0, 1047.63657-0.372589265*T^1+9.45304214E-4*T^2-6.02409443E-7*T^3+1.2858961E-10*T^4}; argunit = K; fununit = J/(kg*K)
  mat2: Common "Silicon" [comp1] on domains 2
    def: def "Basic"
      relpermeability = 1
      electricconductivity = 1e-12[S/m]
      thermalexpansioncoefficient = 2.6e-6[1/K]
      heatcapacity = 700[J/(kg*K)]
      relpermittivity = 11.7
      density = 2329[kg/m^3]
      thermalconductivity = 130[W/(m*K)]
    Enu: Enu "Young's modulus and Poisson's ratio"
      E = 170[GPa]
      nu = 0.28
    RefractiveIndex: RefractiveIndex
      n = 3.48
      ki = 0
  mat3: Common "Air" [comp2] on domains 1
    // same settings as mat1
  mat4: Common "Silicon" [comp2] on domains 2
    // same settings as mat2
  mat5: Common "Air" [comp3] on domains 1, 3
    // same settings as mat1
  mat6: Common "Silicon" [comp3] on domains 3, 4
    // same settings as mat2

Physics
  emw: ElectromagneticWaves "Electromagnetic Waves, Frequency Domain" [geom1] on all domains
    dependent variable E = {Ex, Ey, Ez}
    wee1: WaveEquationElectric (default) | epsilonr_mat = from_mat
    pec1: PerfectElectricConductor (default)
    init1: init "Initial Values 1" (default)
  emw2: ElectromagneticWaves "Electromagnetic Waves, Frequency Domain" [geom2] on all domains
    dependent variable E = {Ex, Ey, Ez}
    wee1: WaveEquationElectric (default)
      DisplacementFieldModel = RelativePermittivity
      multiphysics = The Semiconductor Electromagnetic Waves multiphysics coupling adds additional contributions to the optical properties
      omega1 = 10^5
      omega2 = 10^12
      deltaEpsilon = 1
      epsilonInf = 1
      ConstitutiveRelationH = RelativePermeability
    pec1: PerfectElectricConductor (default)
      constraintOptions = pointwiseConstraints
      constraintType = symmetricConstraint
      constraintMethod = elemental
    init1: init "Initial Values 1" (default)

Mesh
  mesh1 "Mesh 1" [geom1]
    size: MeshSizeDefault | hmax = 4.36E-7; hmin = 1.95E-9; hcurve = 0.3; hgrad = 1.3
    ftri1: FreeTri "Free Triangular 1" on domains 2
      size1: Size on domains 2 | table = semi; hauto = 3
    ftri2: FreeTri "Free Triangular 2" on domains 1
      size1: Size on domains 1 | hauto = 6
  mesh2 "Mesh 1" [geom2]
    size: MeshSizeDefault | hmax = 4.36E-7; hmin = 1.95E-9; hcurve = 0.3; hgrad = 1.3
    ftri1: FreeTri "Free Triangular 1" on domains 2
      size1: Size on domains 2 | table = semi; hauto = 3
    ftri2: FreeTri "Free Triangular 2" on domains 1
      size1: Size on domains 1 | hauto = 6
  mesh3 "Mesh 1" [geom3]
    size: MeshSizeDefault | hmax = 4.36E-7; hmin = 1.95E-9; hcurve = 0.3; hgrad = 1.3
    ftri1: FreeTri "Free Triangular 1" on domains 3, 4
      size1: Size on domains 3, 4 | table = semi; hauto = 4
    ftri2: FreeTri "Free Triangular 2" on domains 1, 2
      size1: Size on domains 1, 2 | hauto = 6

Studies
  std1 "Study 1"
    mode: ModeAnalysis | modeFreq = freq_in; neigs = 2; shift = 3.5; linpsolnum = auto; solve for = {emw}
  std2 "Study 2"
    param: Parametric "Parametric Sweep"
      pname = gap
      plistarr = range(10e-9[m],(1510e-9[m]-(10e-9[m]))/149,1510e-9[m])
      punit = m
      useaccumtable = on
    mode: ModeAnalysis | modeFreq = freq_in; neigs = 2; shift = 3.5; linpsolnum = auto; solve for = {emw2}

Tables
  tbl1: Table
    // Global Evaluation 1
    Effective mode index (1) | B11 (W) | B12 (W) | C12 (1)
    0.985161+1.03502e-08i | 4-8.15942e-42i | 4.85175e-15-2.15202e-15i | 1.21294e-15-5.38005e-16i
    0.987384+6.08215e-09i | 4-8.15942e-42i | 4.85175e-15-2.15202e-15i | 1.21294e-15-5.38005e-16i
    0.990062+1.78451e-09i | 4-8.15942e-42i | 4.85175e-15-2.15202e-15i | 1.21294e-15-5.38005e-16i
    1.08577 | 4-8.15942e-42i | 4.85175e-15-2.15202e-15i | 1.21294e-15-5.38005e-16i
    1.49715-2.50605e-16i | 4-8.15942e-42i | 4.85175e-15-2.15202e-15i | 1.21294e-15-5.38005e-16i
    2.4024-1.00648e-17i | 4-8.15942e-42i | 4.85175e-15-2.15202e-15i | 1.21294e-15-5.38005e-16i
  tbl2: Table "Probe Table 2"
    effective_mode_index | C12 | C21 (1) | X11 (1/m) | X22 (1/m) | K12 (1/m) | K21 (1/m)
    1.4988+2.22453e-09i | nan | nan | 8.26834e+06-1.01295e-20i | nan | nan | nan
    2.40416 | nan | nan | 8.26834e+06 | nan | nan | nan

Plots
  pg1: PlotGroup1D "Probe Plot Group 1"
    tblp1: Table "Probe Table Graph 1" | table = tbl2