// COMSOL Multiphysics 6.3.0.420 model "supermodes.mph"
// Outline of the model tree

Parameters
  wA = 500e-9[m]  // Width of waveguide A.
  hA = 250e-9[m]  // Height of waveguide A.
  wB = 500e-9[m]  // Width of waveguide B.
  hB = 250e-9[m]  // Height of waveguide B.
  gap = 500e-9[m]  // Gap between waveguides.
  domain_width = 5e-6[m]  // Domain width.
  domain_height = 5e-6[m]  // Domain height.
  n_core = 3.45  // Core refractive index.
  n_clad = 1  // Cladding refractive index.
  wavelength = 1550e-9[m]  // Electromagnetic wave wavelength.
  freq_in = c_const/wavelength  // EMW frequency.
  idx_emw = 1
  sol = 'sol1'

Variables
  var1 "supermodes"
    sm_neff = withsol(sol,emw.neff,setind(lambda,idx_emw))
    norm = 1
    Ex_sm = withsol(sol,emw.Ex,setind(lambda,idx_emw))/sqrt(norm)  // Electric field, x-component
    Ey_sm = withsol(sol,emw.Ex,setind(lambda,idx_emw))/sqrt(norm)  // Electric field, y-component
    Ez_sm = withsol(sol,emw.Ez,setind(lambda,idx_emw))/sqrt(norm)  // Electric field, z-component
    Dx_sm = withsol(sol,emw.Dx,setind(lambda,idx_emw))/sqrt(norm)  // Electric displacement field, x-component
    Dy_sm = withsol(sol,emw.Dy,setind(lambda,idx_emw))/sqrt(norm)  // Electric displacement field, y-component
    Dz_sm = withsol(sol,emw.Dz,setind(lambda,idx_emw))/sqrt(norm)  // Electric displacement field, z-component
    Bx_sm = withsol(sol,emw.Bx,setind(lambda,idx_emw))/sqrt(norm)  // Magnetic flux density, x-component
    By_sm = withsol(sol,emw.By,setind(lambda,idx_emw))/sqrt(norm)  // Magnetic flux density, y-component
    Bz_sm = withsol(sol,emw.Bz,setind(lambda,idx_emw))/sqrt(norm)  // Magnetic flux density, z-component
    Hx_sm = withsol(sol,emw.Hx,setind(lambda,idx_emw))/sqrt(norm)  // Magnetic field, x-component
    Hy_sm = withsol(sol,emw.Hy,setind(lambda,idx_emw))/sqrt(norm)  // Magnetic field, y-component
    Hz_sm = withsol(sol,emw.Hz,setind(lambda,idx_emw))/sqrt(norm)  // Magnetic field, z-component
    E_normalization = intop_opt(abs(Ex_sm)^2+abs(Ey_sm)^2+abs(Ez_sm)^2)
    x_pol = intop_opt(abs(Ex_sm)^2)/E_normalization  // Optical polarization percentage x-component
    y_pol = intop_opt(abs(Ey_sm)^2)/E_normalization  // Optical polarization percentage y-component
    z_pol = 1 - x_pol - y_pol  // Optical polarization percentage z-component

Couplings
  intop1: Integration on all domains | opname = intop_opt

Probes
  var1: GlobalVariable "Supermode indices" | expr = sm_neff; descr = Supermode indices
  var2: GlobalVariable "x-pol" | expr = x_pol

Geometry
  geom1 "Geometry 1" (2D, length unit m)
    r1: Rectangle "Cladding" | size = {domain_width, domain_height}; base = center
    r2: Rectangle "WG A" | size = {wA, hA}; base = center; pos = {-gap/2 -wA/2, 0}
    r3: Rectangle "WG B" | size = {wB, hB}; base = center; pos = {gap/2 + wA/2, 0}
    fin: Finalize "Form Union"

Materials
  mat1: Common "Core" on domains 2, 3
    def: def "Basic"
      relpermeability = 1
      relpermittivity = n_core^2
      electricconductivity = 0
  mat2: Common "Material 2"
  mat3: Common "Cladding" on domains 1
    def: def "Basic"
      relpermittivity = n_clad^2
      relpermeability = 1
      electricconductivity = 0

Physics
  emw: ElectromagneticWaves "Electromagnetic Waves, Frequency Domain" on all domains
    dependent variable E = {Ex, Ey, Ez}
    wee1: WaveEquationElectric (default)
    pec1: PerfectElectricConductor (default)
    init1: init "Initial Values 1" (default)
    sctr1: Scattering "Scattering Boundary Condition 1" (disabled) on no boundaries

Mesh
  mesh1 "Mesh 1"
    size: MeshSizeDefault | hmax = 5.0000E-8; hmin = 1.8800E-10; hcurve = 0.25; hgrad = 1.2; hauto = 2; custom = on
    size2: Size on domains 2, 3 | hmax = 10e-9; hauto = 1; custom = on
    ftri1: FreeTri "Free Triangular 1" on remaining entities

Studies
  std1 "Study 1"
    param: Parametric "Parametric Sweep" (disabled)
      sweeptype = filled
      pname = {idx_emw, gap}
      plistarr = {"-1, -2", "50e-9, 75e-9, 100e-9, 200e-9, 300e-9, 400e-9, 500e-9, 1e-6"}
      punit = {, m}
      useaccumtable = on
    mode: ModeAnalysis | modeFreq = freq_in; shift = 4; linpsolnum = auto; neigs = 6